*Heading
** Job name: test_job Model name: Model-1
** Generated by: Abaqus/CAE 2024
*Preprint, echo=NO, model=NO, history=NO, contact=NO
**
** PARTS
**
*Part, name=Part-Core
*End Part
**
*Part, name=Part-InnerSkin
*End Part
**
*Part, name=Part-OuterSkin
*End Part
**
**
** ASSEMBLY
**
*Assembly, name=Assembly
**
*Instance, name=Part-InnerSkin-1, part=Part-InnerSkin
*Node
      1,        1300.,        5000.,   2251.66602
      2,        1300.,           0.,   2251.66602
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*Element, type=S4R
 1,  1,  6, 42, 17
 2,  6,  7, 43, 42
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*Element, type=S3
16, 63, 64, 62
17, 18, 41,  5
18, 60, 22, 56
*Nset, nset=Set-All, generate
  1,  69,   1
*Elset, elset=Set-All, generate
  1,  50,   1
** Section: Section-CFRP-Skin
*Shell Section, elset=Set-All, composite
0.125, 3, CFRP_T1000G, 45.
0.125, 3, CFRP_T1000G, 0.
0.125, 3, CFRP_T1000G, -45.
0.125, 3, CFRP_T1000G, 90.
0.125, 3, CFRP_T1000G, 90.
0.125, 3, CFRP_T1000G, -45.
0.125, 3, CFRP_T1000G, 0.
0.125, 3, CFRP_T1000G, 45.
*End Instance
**
*Instance, name=Part-Core-1, part=Part-Core
*End Instance
**
*Instance, name=Part-OuterSkin-1, part=Part-OuterSkin
*Node
      1,        1319.,        5000.,   2284.57495
      2,        1319.,           0.,   2284.57495
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*Element, type=S4R
 1,  1,  6, 28, 17
 2,  6,  7, 29, 28
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*Element, type=S3
16, 38, 37, 41
*Nset, nset=Set-All, generate
  1,  43,   1
*Elset, elset=Set-All, generate
  1,  30,   1
** Section: Section-CFRP-Skin
*Shell Section, elset=Set-All, composite
0.125, 3, CFRP_T1000G, 45.
0.125, 3, CFRP_T1000G, 0.
0.125, 3, CFRP_T1000G, -45.
0.125, 3, CFRP_T1000G, 90.
0.125, 3, CFRP_T1000G, 90.
0.125, 3, CFRP_T1000G, -45.
0.125, 3, CFRP_T1000G, 0.
0.125, 3, CFRP_T1000G, 45.
*End Instance
**
*Elset, elset=_Surf_Inner_SPOS, internal, instance=Part-InnerSkin-1, generate
  1,  50,   1
*Surface, type=ELEMENT, name=Surf_Inner
_Surf_Inner_SPOS, SPOS
*Elset, elset=_Surf_Outer_SPOS, internal, instance=Part-OuterSkin-1, generate
  1,  30,   1
*Surface, type=ELEMENT, name=Surf_Outer
_Surf_Outer_SPOS, SPOS
*End Assembly
**
** MATERIALS
**
*Material, name=AL_HONEYCOMB
*Density
 5e-11,
*Elastic, type=ENGINEERING CONSTANTS
1.,   1.,1000., 0.01, 0.01, 0.01,   1., 400.
 240.,
*Expansion
 2.3e-05,
*Material, name=CFRP_T1000G
*Density
 1.6e-09,
*Elastic, type=LAMINA
160000.,10000.,   0.3, 5000., 5000., 3000.
*Expansion
 2e-06, 2e-06,    0.
** ----------------------------------------------------------------
**
** STEP: Step-1
**
*Step, name=Step-1, nlgeom=NO
*Static
1., 1., 1e-05, 1.
**
** OUTPUT REQUESTS
**
*Restart, write, frequency=0
**
** FIELD OUTPUT: F-Output-1
**
*Output, field
*Node Output
RF, U
*Element Output, directions=YES
S, TEMP
**
** HISTORY OUTPUT: H-Output-1
**
*Output, history, variable=PRESELECT
*End Step
